<?xml version="1.0" ?>
<rocket_engine name="Lambda-4S First Stage">
  <isp>207.7</isp>
  <builduptime>0.1</builduptime>
  <thrust_table name="propulsion/thrust_prop_remain" type="internal">
    <tableData>
      0.000 87082.621
      41.934 87082.621
      545.141 87082.621
      1048.348 87082.621
      1551.556 87082.621
      2054.763 87082.621
      2557.970 87082.621
      3061.177 87082.621
      3562.629 85951.652
      4054.217 84152.663
      4535.105 82314.018
      5005.901 80667.157
      5468.080 79262.820
      5920.543 77399.918
      6362.235 75462.042
      6792.333 73283.890
      7206.852 70001.206
      7597.235 64617.503
      7942.921 53969.177
      8206.170 36991.377
      8379.901 23884.877
      8488.821 14169.104
      8548.560 6763.783
      8569.358 1721.812
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    </tableData>
  </thrust_table>
</rocket_engine>
