<?xml version="1.0" ?>
<rocket_engine name="Lambda-4S Second Stage">
  <isp>253.2</isp>
  <builduptime>1.5</builduptime>
  <thrust_table name="propulsion/thrust_prop_remain" type="internal">
    <tableData>
      0.000 29160.020
      66.869 29476.979
      261.820 27616.212
      446.498 26477.577
      624.981 25745.329
      799.491 25300.522
      972.187 25260.214
      1146.479 25700.772
      1326.258 26869.644
      1512.966 27726.796
      1707.851 29204.195
      1912.055 30385.297
      2121.780 30884.373
      2334.151 31230.938
      2549.401 31772.211
      2769.270 32451.292
      2993.686 33031.816
      3221.258 33430.672
      3451.664 33923.768
      3683.799 33872.579
      3909.577 30670.669
      4038.624 7957.115
      4064.190 1237.169
      4067.524 333.931
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    </tableData>
  </thrust_table>
</rocket_engine>
