<?xml version="1.0" ?>
<rocket_engine name="Lambda-4S Strap On Booster">
  <isp>270.9</isp>
  <builduptime>0.1</builduptime>
  <thrust_table name="propulsion/thrust_prop_remain" type="internal">
    <tableData>
      0.000 39918.008
      14.769 40103.205
      73.924 39620.383
      130.969 37756.379
      185.503 36109.518
      237.869 34892.560
      288.450 33651.367
      337.374 32695.659
      385.035 31903.095
      431.518 31039.986
      476.714 30204.438
      520.484 29037.095
      562.399 27637.164
      601.933 25736.764
      637.429 21649.399
      661.548 11014.292
      673.707 6155.315
      681.043 3862.511
      685.284 2035.960
      687.223 771.612
      687.811 142.192
      687.841 22.054
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    </tableData>
  </thrust_table>
</rocket_engine>
